<?xml version="1.0"?>
<propeller name="simple_thruster">
  <ixx>0.001</ixx>
  <diameter unit="FT">0.6</diameter>
  <numblades>2</numblades>
  <gearratio>1.0</gearratio>
  <minpitch>10.0</minpitch>
  <maxpitch>25.0</maxpitch>
  <minrpm>1.0</minrpm>
  <maxrpm>2800</maxrpm>
  <constspeed>0</constspeed>

  <table name="C_THRUST" type="internal">
    <tableData>
      0.0   0.0
      0.1   0.08
      0.2   0.16
      0.3   0.24
      0.4   0.32
      0.5   0.40
      0.6   0.48
      0.7   0.56
      0.8   0.64
      0.9   0.72
      1.0   0.80
    </tableData>
  </table>

  <table name="C_POWER" type="internal">
    <tableData>
      0.0   0.0
      0.1   0.01
      0.2   0.04
      0.3   0.09
      0.4   0.16
      0.5   0.25
      0.6   0.36
      0.7   0.49
      0.8   0.64
      0.9   0.81
      1.0   1.00
    </tableData>
  </table>
</propeller>
