<?xml version='1.0' encoding='UTF-8'?>
<fdm_config name="rc_plane" version="2.0" release="ALPHA"
    xmlns:xsi="http://www.w3.org/2001/XMLSchema-instance"
    xsi:noNamespaceSchemaLocation="http://jsbsim.sourceforge.net/JSBSim.xsd">

  <fileheader>
    <author>RC Plane Designer</author>
    <filecreationdate>2025-07-18</filecreationdate>
    <version>2.1</version>
    <description>FIXED RC Aircraft - Working Configuration</description>
  </fileheader>

  <metrics>
    <wingarea unit="FT2">3.2</wingarea>
    <wingspan unit="FT">3.9</wingspan>
    <wing_incidence unit="DEG">1.0</wing_incidence>
    <chord unit="FT">0.8</chord>
    <htailarea unit="FT2">0.65</htailarea>
    <htailarm unit="FT">1.3</htailarm>
    <vtailarea unit="FT2">0.43</vtailarea>
    <vtailarm unit="FT">1.3</vtailarm>
    <location name="AERORP" unit="IN">
      <x>0</x>
      <y>0</y>
      <z>0</z>
    </location>
    <location name="EYEPOINT" unit="IN">
      <x>-4</x>
      <y>0</y>
      <z>2</z>
    </location>
    <location name="VRP" unit="IN">
      <x>0</x>
      <y>0</y>
      <z>0</z>
    </location>
  </metrics>

  <mass_balance>
    <ixx unit="SLUG*FT2">0.5</ixx>
    <iyy unit="SLUG*FT2">0.8</iyy>
    <izz unit="SLUG*FT2">1.2</izz>
    <ixy unit="SLUG*FT2">0</ixy>
    <ixz unit="SLUG*FT2">0</ixz>
    <iyz unit="SLUG*FT2">0</iyz>
    <emptywt unit="LBS">2.2</emptywt>
    <location name="CG" unit="IN">
      <x>2.5</x>
      <y>0</y>
      <z>0</z>
    </location>
  </mass_balance>

  <ground_reactions>
    <contact type="BOGEY" name="NOSE">
      <location unit="IN">
        <x>-8</x>
        <y>0</y>
        <z>-3</z>
      </location>
      <static_friction>0.8</static_friction>
      <dynamic_friction>0.6</dynamic_friction>
      <rolling_friction>0.02</rolling_friction>
      <spring_coeff unit="LBS/FT">100</spring_coeff>
      <damping_coeff unit="LBS/FT/SEC">20</damping_coeff>
      <max_steer unit="DEG">15</max_steer>
      <brake_group>NONE</brake_group>
      <retractable>0</retractable>
    </contact>

    <contact type="BOGEY" name="LEFT_MAIN">
      <location unit="IN">
        <x>4</x>
        <y>-12</y>
        <z>-3</z>
      </location>
      <static_friction>0.8</static_friction>
      <dynamic_friction>0.6</dynamic_friction>
      <rolling_friction>0.02</rolling_friction>
      <spring_coeff unit="LBS/FT">150</spring_coeff>
      <damping_coeff unit="LBS/FT/SEC">30</damping_coeff>
      <brake_group>LEFT</brake_group>
      <retractable>0</retractable>
    </contact>

    <contact type="BOGEY" name="RIGHT_MAIN">
      <location unit="IN">
        <x>4</x>
        <y>12</y>
        <z>-3</z>
      </location>
      <static_friction>0.8</static_friction>
      <dynamic_friction>0.6</dynamic_friction>
      <rolling_friction>0.02</rolling_friction>
      <spring_coeff unit="LBS/FT">150</spring_coeff>
      <damping_coeff unit="LBS/FT/SEC">30</damping_coeff>
      <brake_group>RIGHT</brake_group>
      <retractable>0</retractable>
    </contact>
  </ground_reactions>

  <propulsion>
    <!-- BACK TO WORKING ENGINE - we'll control with very low throttle -->
    <engine file="electric_1mw">
      <location unit="IN">
        <x>-6</x>
        <y>0</y>
        <z>0</z>
      </location>
      <orient unit="DEG">
        <pitch>0</pitch>
        <roll>0</roll>
        <yaw>0</yaw>
      </orient>
      <feed>0</feed>
      <thruster file="prop_Clark_Y7570">
        <location unit="IN">
          <x>-6</x>
          <y>0</y>
          <z>0</z>
        </location>
        <orient unit="DEG">
          <pitch>0</pitch>
          <roll>0</roll>
          <yaw>0</yaw>
        </orient>
        <sense>1</sense>
        <p_factor>0.001</p_factor>
      </thruster>
    </engine>

    <tank type="FUEL" number="0">
      <location unit="IN">
        <x>0</x>
        <y>0</y>
        <z>0</z>
      </location>
      <capacity unit="LBS">0.5</capacity>
      <contents unit="LBS">0.5</contents>
    </tank>
  </propulsion>

  <flight_control name="FCS">
    <channel name="Pitch">
      <summer name="Pitch Trim Sum">
        <input>fcs/elevator-cmd-norm</input>
        <input>fcs/pitch-trim-cmd-norm</input>
        <clipto>
          <min>-1</min>
          <max>1</max>
        </clipto>
      </summer>

      <aerosurface_scale name="Elevator Control">
        <input>fcs/pitch-trim-sum</input>
        <range>
          <min>-0.35</min>
          <max>0.35</max>
        </range>
        <output>fcs/elevator-pos-rad</output>
      </aerosurface_scale>

      <aerosurface_scale name="elevator normalization">
        <input>fcs/elevator-pos-rad</input>
        <domain>
          <min>-0.35</min>
          <max>0.35</max>
        </domain>
        <range>
          <min>-1</min>
          <max>1</max>
        </range>
        <output>fcs/elevator-pos-norm</output>
      </aerosurface_scale>
    </channel>

    <channel name="Roll">
      <summer name="Roll Trim Sum">
        <input>fcs/aileron-cmd-norm</input>
        <input>fcs/roll-trim-cmd-norm</input>
        <clipto>
          <min>-1</min>
          <max>1</max>
        </clipto>
      </summer>

      <aerosurface_scale name="Left Aileron Control">
        <input>fcs/roll-trim-sum</input>
        <range>
          <min>-0.35</min>
          <max>0.35</max>
        </range>
        <output>fcs/left-aileron-pos-rad</output>
      </aerosurface_scale>

      <aerosurface_scale name="Right Aileron Control">
        <input>-fcs/roll-trim-sum</input>
        <range>
          <min>-0.35</min>
          <max>0.35</max>
        </range>
        <output>fcs/right-aileron-pos-rad</output>
      </aerosurface_scale>
    </channel>

    <channel name="Yaw">
      <summer name="Rudder Command Sum">
        <input>fcs/rudder-cmd-norm</input>
        <input>fcs/yaw-trim-cmd-norm</input>
        <clipto>
          <min>-1</min>
          <max>1</max>
        </clipto>
      </summer>

      <aerosurface_scale name="Rudder Control">
        <input>fcs/rudder-command-sum</input>
        <range>
          <min>-0.35</min>
          <max>0.35</max>
        </range>
        <output>fcs/rudder-pos-rad</output>
      </aerosurface_scale>

      <aerosurface_scale name="rudder normalization">
        <input>fcs/rudder-pos-rad</input>
        <domain>
          <min>-0.35</min>
          <max>0.35</max>
        </domain>
        <range>
          <min>-1</min>
          <max>1</max>
        </range>
        <output>fcs/rudder-pos-norm</output>
      </aerosurface_scale>
    </channel>

    <channel name="Throttle">
      <kinematic name="Throttle Control">
        <input>fcs/throttle-cmd-norm</input>
        <traverse>
          <setting>
            <position>0</position>
            <time>0</time>
          </setting>
          <setting>
            <position>1</position>
            <time>1</time>
          </setting>
        </traverse>
        <output>fcs/throttle-pos-norm</output>
      </kinematic>
    </channel>
  </flight_control>

  <aerodynamics>
    <axis name="LIFT">
      <function name="aero/coefficient/CLalpha">
        <description>Lift_due_to_alpha</description>
        <product>
          <property>aero/qbar-psf</property>
          <property>metrics/Sw-sqft</property>
          <value>3.5</value>
          <property>aero/alpha-rad</property>
        </product>
      </function>

      <function name="aero/coefficient/CLde">
        <description>Lift_due_to_Elevator_Deflection</description>
        <product>
          <property>aero/qbar-psf</property>
          <property>metrics/Sw-sqft</property>
          <value>0.2</value>
          <property>fcs/elevator-pos-rad</property>
        </product>
      </function>

      <function name="aero/coefficient/CLq">
        <description>Lift_due_to_pitch_rate</description>
        <product>
          <property>aero/qbar-psf</property>
          <property>metrics/Sw-sqft</property>
          <property>metrics/cbarw-ft</property>
          <value>2.5</value>
          <property>velocities/q-aero-rad_sec</property>
          <property>aero/ci2vel</property>
        </product>
      </function>

      <function name="aero/coefficient/CLadot">
        <description>Lift_due_to_alpha_rate</description>
        <product>
          <property>aero/qbar-psf</property>
          <property>metrics/Sw-sqft</property>
          <property>metrics/cbarw-ft</property>
          <value>0.8</value>
          <property>aero/alphadot-rad_sec</property>
          <property>aero/ci2vel</property>
        </product>
      </function>
    </axis>

    <axis name="DRAG">
      <function name="aero/coefficient/CD0">
        <description>Drag_at_zero_lift</description>
        <product>
          <property>aero/qbar-psf</property>
          <property>metrics/Sw-sqft</property>
          <value>0.035</value>
        </product>
      </function>

      <function name="aero/coefficient/CDalpha">
        <description>Drag_due_to_alpha</description>
        <product>
          <property>aero/qbar-psf</property>
          <property>metrics/Sw-sqft</property>
          <value>0.08</value>
          <property>aero/alpha-rad</property>
          <property>aero/alpha-rad</property>
        </product>
      </function>

      <function name="aero/coefficient/CDde">
        <description>Drag_due_to_elevator_deflection</description>
        <product>
          <property>aero/qbar-psf</property>
          <property>metrics/Sw-sqft</property>
          <value>0.03</value>
          <abs><property>fcs/elevator-pos-rad</property></abs>
        </product>
      </function>
    </axis>

    <axis name="SIDE">
      <function name="aero/coefficient/CYbeta">
        <description>Side_force_due_to_beta</description>
        <product>
          <property>aero/qbar-psf</property>
          <property>metrics/Sw-sqft</property>
          <value>-0.3</value>
          <property>aero/beta-rad</property>
        </product>
      </function>

      <function name="aero/coefficient/CYdr">
        <description>Side_force_due_to_rudder</description>
        <product>
          <property>aero/qbar-psf</property>
          <property>metrics/Sw-sqft</property>
          <value>0.12</value>
          <property>fcs/rudder-pos-rad</property>
        </product>
      </function>
    </axis>

    <axis name="ROLL">
      <function name="aero/coefficient/Clbeta">
        <description>Roll_moment_due_to_beta</description>
        <product>
          <property>aero/qbar-psf</property>
          <property>metrics/Sw-sqft</property>
          <property>metrics/bw-ft</property>
          <value>-0.08</value>
          <property>aero/beta-rad</property>
        </product>
      </function>

      <function name="aero/coefficient/Clp">
        <description>Roll_moment_due_to_roll_rate</description>
        <product>
          <property>aero/qbar-psf</property>
          <property>metrics/Sw-sqft</property>
          <property>metrics/bw-ft</property>
          <property>aero/bi2vel</property>
          <value>-0.25</value>
          <property>velocities/p-aero-rad_sec</property>
        </product>
      </function>

      <function name="aero/coefficient/Clr">
        <description>Roll_moment_due_to_yaw_rate</description>
        <product>
          <property>aero/qbar-psf</property>
          <property>metrics/Sw-sqft</property>
          <property>metrics/bw-ft</property>
          <property>aero/bi2vel</property>
          <value>0.03</value>
          <property>velocities/r-aero-rad_sec</property>
        </product>
      </function>

      <function name="aero/coefficient/Clda">
        <description>Roll_moment_due_to_aileron</description>
        <product>
          <property>aero/qbar-psf</property>
          <property>metrics/Sw-sqft</property>
          <property>metrics/bw-ft</property>
          <value>0.06</value>
          <property>fcs/left-aileron-pos-rad</property>
        </product>
      </function>

      <function name="aero/coefficient/Cldr">
        <description>Roll_moment_due_to_rudder</description>
        <product>
          <property>aero/qbar-psf</property>
          <property>metrics/Sw-sqft</property>
          <property>metrics/bw-ft</property>
          <value>0.003</value>
          <property>fcs/rudder-pos-rad</property>
        </product>
      </function>
    </axis>

    <axis name="PITCH">
      <function name="aero/coefficient/Cmalpha">
        <description>Pitch_moment_due_to_alpha</description>
        <product>
          <property>aero/qbar-psf</property>
          <property>metrics/Sw-sqft</property>
          <property>metrics/cbarw-ft</property>
          <value>-0.2</value>
          <property>aero/alpha-rad</property>
        </product>
      </function>

      <function name="aero/coefficient/Cmde">
        <description>Pitch_moment_due_to_elevator</description>
        <product>
          <property>aero/qbar-psf</property>
          <property>metrics/Sw-sqft</property>
          <property>metrics/cbarw-ft</property>
          <value>-0.8</value>
          <property>fcs/elevator-pos-rad</property>
        </product>
      </function>

      <function name="aero/coefficient/Cmq">
        <description>Pitch_moment_due_to_pitch_rate</description>
        <product>
          <property>aero/qbar-psf</property>
          <property>metrics/Sw-sqft</property>
          <property>metrics/cbarw-ft</property>
          <property>aero/ci2vel</property>
          <value>-5.0</value>
          <property>velocities/q-aero-rad_sec</property>
        </product>
      </function>

      <function name="aero/coefficient/Cmadot">
        <description>Pitch_moment_due_to_alpha_rate</description>
        <product>
          <property>aero/qbar-psf</property>
          <property>metrics/Sw-sqft</property>
          <property>metrics/cbarw-ft</property>
          <property>aero/ci2vel</property>
          <value>-1.0</value>
          <property>aero/alphadot-rad_sec</property>
        </product>
      </function>
    </axis>

    <axis name="YAW">
      <function name="aero/coefficient/Cnbeta">
        <description>Yaw_moment_due_to_beta</description>
        <product>
          <property>aero/qbar-psf</property>
          <property>metrics/Sw-sqft</property>
          <property>metrics/bw-ft</property>
          <value>0.05</value>
          <property>aero/beta-rad</property>
        </product>
      </function>

      <function name="aero/coefficient/Cnr">
        <description>Yaw_moment_due_to_yaw_rate</description>
        <product>
          <property>aero/qbar-psf</property>
          <property>metrics/Sw-sqft</property>
          <property>metrics/bw-ft</property>
          <property>aero/bi2vel</property>
          <value>-0.08</value>
          <property>velocities/r-aero-rad_sec</property>
        </product>
      </function>

      <function name="aero/coefficient/Cndr">
        <description>Yaw_moment_due_to_rudder</description>
        <product>
          <property>aero/qbar-psf</property>
          <property>metrics/Sw-sqft</property>
          <property>metrics/bw-ft</property>
          <value>-0.04</value>
          <property>fcs/rudder-pos-rad</property>
        </product>
      </function>
    </axis>
  </aerodynamics>

</fdm_config>
